// SBML level 3 version 1

model main()
  // model units - substance: mole, time: second, extent: mole

  // Compartments:
  compartment c1 = 1 litre;
  compartment comp = 1 litre;

  // Species:
  species ESC in comp = 100/comp;
  species EPI in comp = 0;
  species NPC in comp = 0;

  // Parameters:
  r1 = 0.032 per_second;
  r2 = 0.017 per_second;

  // Reactions:
  ESC_diff: ESC => EPI; ESC*r1;
    ESC_diff_shape_param = 27.6; ESC_diff_distribution_index = 3;
  EPI_diff: EPI => NPC; EPI*r2;
    EPI_diff_shape_param = 39.29; EPI_diff_distribution_index = 3;

  // Unit definitions:
  unit per_second = 1 / second;
end
